OpenVSP model (file version 5), 17 components.
Geometry view with OpenVSP parameter names; values to 6 digits, angles in degrees, lengths in the model's unit.
Overall bounding box: X_Min=0 X_Len=16.8692 Y_Min=-14.2725 Y_Len=28.423 Z_Min=0 Z_Len=8.29463

Fuselage "Fuselage — plan-derived loft required"
  location (X Y Z) 0 0 3.35681, rotation 0 0 0
  bounding box size 14.0194 2.85446 3.42535
  Design: Length=14.0194
  cross sections:
    n  XLocPercent  YLocPercent  ZLocPercent  shape
    0  0            0            0            point
    1  0.25         0            0            ellipse Ellipse_Height=3.42535 Ellipse_Width=2.85446
    2  0.5          0            0            as above
    3  0.75         0            0            as above
    4  1            0            0            point

Wing "Main Wing"
  location (X Y Z) 7.88389 0 3.76954, rotation 0 0 0
  symmetric about XZ
  bounding box size 7.26994 28.125 0.801352
  totals: TotalSpan=28.125 TotalProjectedSpan=28.125 TotalChord=3.14854 TotalArea=88.5526 TotalAR=8.93272 MAC=3.36373
  root: chord 4.58203, twist 0, airfoil file "EPPLER 1230 AIRFOIL"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 BaseThickChord=0.175704 ThickChord=0.175704
  sections:
    n  Span     Root_Chord  Tip_Chord  Area     Sweep    Sweep_Location  Dihedral  Twist  Twist_Location  tip airfoil
    1  14.0625  4.58203     1.71505    44.2763  21.5838  0               0         -6.5   0.25            as above

Wing "Canard — Roncz 1145MS verification needed"
  location (X Y Z) 2.13945 0 3.94089, rotation 0 0 0
  symmetric about XZ
  bounding box size 1.0286 12.5636 0.195349
  totals: TotalSpan=12.5636 TotalProjectedSpan=12.5636 TotalChord=1.0286 TotalArea=12.9229 TotalAR=12.2143 MAC=1.0286
  root: chord 1.0286, twist 0, airfoil file "RONCZ R1145MS AIRFOIL"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 BaseThickChord=0.188069 ThickChord=0.188069
  sections:
    n  Span     Root_Chord  Tip_Chord  Area     Sweep  Sweep_Location  Dihedral  Twist  Twist_Location  tip airfoil
    1  6.28182  1.0286      1.0286     6.46147  0      0               0         0      0.25            as above

Wing "Left main-wing tip winglet"
  location (X Y Z) 13.7442 -14.0625 3.76954, rotation 90 0 0
  bounding box size 3.125 0.298017 4.52509
  totals: TotalSpan=4.52509 TotalProjectedSpan=4.52509 TotalChord=1.07177 TotalArea=4.84987 TotalAR=4.22206 MAC=1.1961
  root: chord 1.70402, twist 0, airfoil file "EPPLER 1230 AIRFOIL"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 BaseThickChord=0.175704 ThickChord=0.175704
  sections:
    n  Span     Root_Chord  Tip_Chord  Area     Sweep    Sweep_Location  Dihedral  Twist  Twist_Location  tip airfoil
    1  4.52509  1.70402     0.439522   4.84987  30.6876  0               0         0      0.25            as above

Wing "Right main-wing tip winglet"
  location (X Y Z) 13.7442 14.0625 3.76954, rotation 90 0 0
  bounding box size 3.125 0.298017 4.52509
  totals: TotalSpan=4.52509 TotalProjectedSpan=4.52509 TotalChord=1.07177 TotalArea=4.84987 TotalAR=4.22206 MAC=1.1961
  root: chord 1.70402, twist 0, airfoil file "EPPLER 1230 AIRFOIL"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 BaseThickChord=0.175704 ThickChord=0.175704
  sections:
    n  Span     Root_Chord  Tip_Chord  Area     Sweep    Sweep_Location  Dihedral  Twist  Twist_Location  tip airfoil
    1  4.52509  1.70402     0.439522   4.84987  30.6876  0               0         0      0.25            as above

Pod "Left strake transition"
  location (X Y Z) 5.3589 -2.1 3.76954, rotation 0 0 0
  bounding box size 8.1554 0.75 0.75
  Design: FineRatio=21.7477 Length=8.1554

Pod "Right strake transition"
  location (X Y Z) 5.3589 2.1 3.76954, rotation 0 0 0
  bounding box size 8.1554 0.75 0.75
  Design: FineRatio=21.7477 Length=8.1554

Pod "Rear engine cowl"
  location (X Y Z) 11.9694 0 5.20681, rotation 0 0 0
  bounding box size 2.05 1.65 1.65
  Design: FineRatio=2.48485 Length=2.05

Pod "Pusher propeller spinner"
  location (X Y Z) 14.0645 0 4.22677, rotation 0 0 0
  bounding box size 1.35102 0.924684 0.924684
  Design: FineRatio=2.92211 Length=1.35102

Propeller "Pusher propeller disk — reference only"
  location (X Y Z) 14.1918 0 4.22677, rotation 0 0 0
  bounding box size 0.282555 4.4647 5.10874
  Design: Diameter=5.68555 NumBlade=3 Beta34=20 UseBeta34Flag=1 Feather=0 Rotate=0 Precone=0 ReverseFlag=0 FoldAngle=0 PropMode=0 AF=151.538 CLi=0.538798 Chord=0.177656 Solidity=0.169649 ConstructXoC=0.5 FeatherAxisXoC=0.5 FeatherOffsetXoC=0
  cross sections:
    n  RadiusFrac  shape
    0  0.2         ellipse Ellipse_Height=0.113711 Ellipse_Width=0.227422
    1  0.4         NACA 16-series Chord=0.472612 IdealCl=0.7 ThickChord=0.144074
    2  1           NACA 16-series Chord=0.369561 IdealCl=0.2 ThickChord=0.03
  Chord along r/R (cubic Bezier): 0.2: 0.08, 0.333333: 0.15, 0.466667: 0.2, 0.6: 0.2, 0.716667: 0.2, 0.833333: 0.2, 0.95: 0.2, 0.966667: 0.2, 0.983333: 0.2, 1: 0.13
  Twist along r/R (PCHIP): 0.2: 46.75, 0.75: 20, 1: 13
  Thick along r/R (cubic Bezier): 0.2: 0.5, 0.233333: 0.3, 0.266667: 0.225, 0.3: 0.2, 0.4: 0.125, 0.5: 0.115, 0.6: 0.1, 0.733333: 0.075, 0.866667: 0.055, 1: 0.03
  CLI along r/R (cubic Bezier): 0.2: 0, 0.266667: 0.7, 0.333333: 0.7, 0.4: 0.7, 0.466667: 0.7, 0.533333: 0.7, 0.6: 0.7, 0.733333: 0.7, 0.866667: 0.7, 1: 0.2

Pod "Nose gear  fairing placeholder"
  location (X Y Z) 2.45 0 0.417471, rotation 0 0 0
  bounding box size 1.3 0.834941 0.834941
  Design: FineRatio=3.11399 Length=1.3

Pod "Left main gear  fairing placeholder"
  location (X Y Z) 8.15 -2.94238 0.432617, rotation 0 0 0
  bounding box size 1.6 0.865234 0.865234
  Design: FineRatio=3.69842 Length=1.6

Pod "Right main gear  fairing placeholder"
  location (X Y Z) 8.15 2.94238 0.432617, rotation 0 0 0
  bounding box size 1.6 0.865234 0.865234
  Design: FineRatio=3.69842 Length=1.6

Pod "Front occupants mass envelope"
  location (X Y Z) 4.7 0 4.8068, rotation 0 0 0
  bounding box size 1.65 2.2 2.2
  Design: FineRatio=1.5 Length=1.65

Pod "Rear occupants mass envelope"
  location (X Y Z) 7.05 0 4.7768, rotation 0 0 0
  bounding box size 1.45 2.2 2.2
  Design: FineRatio=1.31818 Length=1.45

Pod "Left fuel volume envelope"
  location (X Y Z) 7.85 -2.1 4.5568, rotation 0 0 0
  bounding box size 2.5 0.65 0.65
  Design: FineRatio=7.69231 Length=2.5

Pod "Right fuel volume envelope"
  location (X Y Z) 7.85 2.1 4.5568, rotation 0 0 0
  bounding box size 2.5 0.65 0.65
  Design: FineRatio=7.69231 Length=2.5
